# a)
(s + ω_1)/(s + ω_2)
# Definition på billineære transformation: (approksimation til digital domæne)
s == 2/T*((1 - z^-1)/(1 + z^-1))  # <- T = sampling periode.
# Substitution:
s/(s + ω_2) == 2/T*((1 - z^-1)/(1 + z^-1))/(2/T*((1 - z^-1)/(1 + z^-1)) + ω_2)  # og:
ω_1/(s + ω_2) == ω_1/(2/T*((1 - z^-1)/(1 + z^-1)) + ω_2)
# Samlet:
(s + ω_1)/(s + ω_2) == (2/T*((1 - z^-1)/(1 + z^-1)) + ω_1)/(2/T*((1 - z^-1)/(1 + z^-1)) + ω_2)  # ->
(2/T*((1 - z^-1)/(1 + z^-1)) + ω_1)/(2/T*((1 - z^-1)/(1 + z^-1)) + ω_2) simplify → (2*z + ω_1*T + ω_1*T*z - 2)/(2*z + ω_2*T + ω_2*T*z - 2)
(2*z + ω_1*T(1 + z) - 2)/(2*z + ω_2*T(1 + z) - 2)
ω_1 := 565
ω_2 := 942
T := 0.001
(2*z + ω_1*T*(1 + z) - 2)/(2*z + ω_2*T*(1 + z) - 2) float, 3 → (2.56*z - 1.43)/(2.94*z - 1.06)
# Opgave 3.14 - e:
H(z) == Y(z)/X(z) == (2.56*z - 1.43)/(2.94*z - 1.06)
# z^1 giver ikke mening, da z^-1 repræsenterer en forsinkelse på 1 sample, og vi kan ikke have en forsinkelse på -1 sample.
# Forlænger derfor brøk med z^-1:
(2.56*z - 1.43)/(2.94*z - 1.06)*z^-1/z^-1
# ->
(2.56 - 1.43*z^-1)/(2.94 - 1.06*z^-1)
# Det vides at:
H(z) == Y(z)/X(z)
Y(z) == H(z)*X(z)
# Det fås derfor at:
Y(z) == (2.56 - 1.43*z^-1)*X(z)/(2.94 - 1.06*z^-1)
# Ganger nævneren over:
Y(z)*2.94 - 1.06*z^-1*Y(z) == (2.56 - 1.43*z^-1)*X(z)
# Normaliserer:
-1.06/2.94 = -0.360544
Y(z) - 0.361*z^-1*Y(z) == (0.871 - 0.486*z^-1)*X(z)
2.56/2.94 = 0.870748
# Isolerer for Y(z):
Y(z) == (0.871 - 0.486*z^-1)*X(z) + 0.361*z^-1*Y(z)
-1.43/2.94 = -0.486395
Y(z) == (0.871 - 0.486*z^-1)*X(z) + 0.361*z^-1*Y(z)
# Ovenstående udtryk kan så udtrykkes som differens.
# Parentser = [], men det kan man ikke i Mathcad...:
y(n) == 0.871*x(n) - 0.486*x(n - 1) + 0.361*y(n - 1)
